# OpenSim document version 40000
InverseKinematicsTool generic:
  constraint_weight: Inf
  accuracy: 1e-5
  time_range: -Inf Inf
  report_errors: true
  report_marker_locations: true
  IKTaskSet:
    IKMarkerTask C7: apply=true weight=5
    IKMarkerTask R_Shoulder: apply=true weight=5
    IKMarkerTask L_Shoulder: apply=true weight=5
    IKMarkerTask R_Sternum: apply=true weight=5
    IKMarkerTask L_Sternum: apply=true weight=5
    IKMarkerTask r.ASIS: apply=true weight=25
    IKMarkerTask L.ASIS: apply=true weight=25
    IKMarkerTask r.PSIS: apply=true weight=25
    IKMarkerTask L.PSIS: apply=true weight=25
    IKMarkerTask r_thigh1: apply=true weight=4
    IKMarkerTask r_thigh2: apply=true weight=4
    IKMarkerTask r_thigh3: apply=true weight=4
    IKMarkerTask r_thigh4: apply=true weight=4
    IKMarkerTask r_thigh5: apply=true weight=4
    IKMarkerTask r_knee: apply=true weight=20
    IKMarkerTask r_mknee: apply=true weight=0
    IKMarkerTask r_shank_antsup: apply=true weight=4
    IKMarkerTask r_sh2: apply=true weight=4
    IKMarkerTask r_sh3: apply=true weight=4
    IKMarkerTask r_sh4: apply=true weight=4
    IKMarkerTask r_ankle: apply=true weight=20
    IKMarkerTask r_mankle: apply=true weight=0
    IKMarkerTask r_toe: apply=true weight=7
    IKMarkerTask r_5meta: apply=true weight=7
    IKMarkerTask r_calc: apply=true weight=7
    IKMarkerTask L_thigh1: apply=true weight=4
    IKMarkerTask L_thigh2: apply=true weight=4
    IKMarkerTask L_thigh3: apply=true weight=4
    IKMarkerTask L_thigh4: apply=true weight=4
    IKMarkerTask L_knee: apply=true weight=20
    IKMarkerTask L_mknee: apply=true weight=0
    IKMarkerTask L_ankle: apply=true weight=20
    IKMarkerTask L_shank_antsup: apply=true weight=4
    IKMarkerTask L_sh2: apply=true weight=4
    IKMarkerTask L_sh3: apply=true weight=4
    IKMarkerTask L_mankle: apply=true weight=0
    IKMarkerTask L_toe: apply=true weight=7
    IKMarkerTask L_calc: apply=true weight=7
    IKMarkerTask L_5meta: apply=true weight=7
    IKMarkerTask R_elbow_med: apply=true weight=5
    IKMarkerTask R_elbow_lat: apply=true weight=5
    IKMarkerTask R_wrist_radius: apply=true weight=5
    IKMarkerTask R_wrist_ulna: apply=true weight=5
    IKMarkerTask L_elbow_med: apply=true weight=5
    IKMarkerTask L_elbow_lat: apply=true weight=5
    IKMarkerTask L_wrist_radius: apply=true weight=5
    IKMarkerTask L_wrist_ulna: apply=true weight=5
    IKCoordinateTask knee_adduction_r: apply=true weight=0.001 value_type=manual_value value=0
    IKCoordinateTask knee_adduction_l: apply=true weight=0.001 value_type=manual_value value=0
